OpenVSP model (file version 4), 6 components.
Geometry view with OpenVSP parameter names; values to 6 digits, angles in degrees, lengths in the model's unit.
Overall bounding box: X_Min=0 X_Len=1380 Y_Min=-898.859 Y_Len=1797.72 Z_Min=-74.9756 Z_Len=238.993

Blank "BlankGeom"
  location (X Y Z) 0 0 0, rotation 0 0 0

WireFrame "Fuse_0", child of "BlankGeom"
  location (X Y Z) 0 0 0, rotation 0 0 0
  WireFrame: ISkipEnd=0 ISkipStart=0 IStartPatchType=0 IStride=1 JSkipEnd=0 JSkipStart=0 JStride=1 WireType=1
  Wireframe: FlipIJFlag=0 InvertFlag=1 RevIFlag=0 RevJFlag=0

WireFrame "VertTail_0", child of "BlankGeom"
  location (X Y Z) 0 0 0, rotation 0 0 0
  WireFrame: ISkipEnd=0 ISkipStart=0 IStartPatchType=0 IStride=1 JSkipEnd=0 JSkipStart=0 JStride=1 WireType=0
  Wireframe: FlipIJFlag=0 InvertFlag=0 RevIFlag=0 RevJFlag=0

WireFrame "VertTail_1", child of "BlankGeom"
  location (X Y Z) 0 0 0, rotation 0 0 0
  WireFrame: ISkipEnd=0 ISkipStart=0 IStartPatchType=0 IStride=1 JSkipEnd=0 JSkipStart=0 JStride=1 WireType=0
  Wireframe: FlipIJFlag=0 InvertFlag=1 RevIFlag=0 RevJFlag=0

WireFrame "HorizTail_0", child of "BlankGeom"
  location (X Y Z) 0 0 0, rotation 0 0 0
  WireFrame: ISkipEnd=0 ISkipStart=0 IStartPatchType=0 IStride=1 JSkipEnd=0 JSkipStart=0 JStride=1 WireType=0
  Wireframe: FlipIJFlag=0 InvertFlag=1 RevIFlag=0 RevJFlag=0

Wing "WingGeom", child of "BlankGeom"
  location (X Y Z) 679.12 0 -49.35, rotation 0 0 0
  symmetric about XZ
  bounding box size 180.654 1797.72 58.0039
  totals: TotalSpan=1800 TotalProjectedSpan=1797.72 TotalChord=144.45 TotalArea=209400 TotalAR=15.4336
  root: chord 180.6, twist 0, airfoil file "D8 WING"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 ThickChord=0.1
  sections:
    n  Span  Root_Chord  Tip_Chord  Area   Sweep    Sweep_Location  Dihedral  Twist  Twist_Location  tip airfoil
    1  100   180.6       180.6      18060  0        0               2.885     -0.6   0.25            as above
    2  800   180.6       36         86640  9.27554  0               2.885     -0.6   0.25            as above
